! =====================================================================
! ANSYS Mechanical APDL skeleton input file
! Auto-generated by ansys_thermal.ansys.input_generator
!
! Simulation name : ladakh_passive_shelter
! Analysis type   : transient_thermal
!
! SCOPE / LIMITATIONS (read before running):
!   - This file sets up parameters, element type, and material
!     properties (MP commands) for a transient thermal analysis of a
!     rectangular shelter.
!   - Geometry creation (BLOCK), meshing (VMESH/ESIZE), and boundary
!     condition application (SF/SFE for convection, radiation, and
!     solar loads) are scripted below using the parameters, but the
!     exact mesh density, contact handling between elements (if the
!     model is split into multiple volumes), and solar-load application
!     method (SFE with time-varying tabular loads) SHOULD be reviewed
!     and adjusted by an engineer in ANSYS Mechanical APDL or Workbench
!     before production use.
!   - This file has NOT been executed or validated against a licensed
!     ANSYS installation as part of this Python package. Treat it as a
!     documented starting point, not a validated solver-ready model.
! =====================================================================

/CLEAR
/TITLE, ladakh_passive_shelter
/PREP7

! --- Element type: 3-D thermal solid ---
ET,1,SOLID70   ! 3-D 8-node thermal solid element

! --- Material properties (MP commands) ---
! Material 1: Wall
MP,KXX,1,1.1
MP,DENS,1,2000.0
MP,C,1,900.0
! Material 2: Roof
MP,KXX,2,1.75
MP,DENS,2,2400.0
MP,C,2,880.0
! Material 3: Floor
MP,KXX,3,1.75
MP,DENS,3,2400.0
MP,C,3,880.0
! Material 4: Window / opening
MP,KXX,4,0.7
MP,DENS,4,2500.0
MP,C,4,840.0

! --- Parameterized geometry (rectangular shelter) ---
LEN = 6.0        ! shelter length, m
WID = 4.0         ! shelter width, m
HGT = 2.8        ! shelter height, m
TWALL = 0.45   ! wall thickness, m
TROOF = 0.3   ! roof thickness, m
TFLOOR = 0.2 ! floor thickness, m

! Build outer and inner blocks, subtract to form wall shell.
! (Engineer should review Boolean operations / sizing before meshing.)
BLOCK,0,LEN,0,WID,0,HGT                 ! outer shelter volume
BLOCK,TWALL,LEN-TWALL,TWALL,WID-TWALL,TFLOOR,HGT-TROOF  ! inner air volume
VSBV,1,2      ! subtract inner from outer -> wall+roof+floor shell

! --- Meshing (review element size before production run) ---
ESIZE,0.1     ! default 0.1 m element size; refine as needed
VMESH,ALL

! --- Boundary conditions ---
TAMB_INIT = 10.0   ! initial indoor temperature, degC
HCONV_IN = 8.0   ! internal convection coeff, W/m2.K
HCONV_OUT = 25.0 ! external convection coeff, W/m2.K
TGROUND = 2.0    ! ground temperature, degC

! Apply initial condition
IC,ALL,TEMP,TAMB_INIT

! External convection surfaces: select exterior wall/roof faces, then:
!   SF,ALL,CONV,HCONV_OUT,TAMB_TABLE   (TAMB_TABLE = time-varying ambient,
!   defined via *DIM / tabular load referencing the climate series in the
!   accompanying JSON config)
! Floor: apply TGROUND as a fixed-temperature or convection condition.
! Solar load: apply as surface heat flux (SFE,...,HFLUX,...) scaled by
!   surface solar absorptivity and the solar_irradiance_w_m2 series.
! -- These selections depend on final meshed geometry and are left for
!    the engineer to complete in ANSYS Mechanical APDL / Workbench.

! --- Analysis configuration: transient thermal ---
/SOLU
ANTYPE,TRANS
TIME,172800.0   ! total time, seconds
DELTIM,3600.0             ! time step, seconds
KBC,0        ! ramped loading between substeps
AUTOTS,ON

! SOLVE  ! <-- uncomment to run once BCs/mesh are finalized

FINISH
